*Heading
** Job name: Ring_plate_08 Model name: Ring_plate
** Generated by: Abaqus/CAE 6.12-1
*Preprint, echo=NO, model=NO, history=NO, contact=NO
**
** PARTS
**
*Part, name=Part-1
*Node
      1,   9.99998474,           0., -0.0174532831
      2,   9.19998646,           0., -0.0160570201
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*Element, type=STRI65
  1,    1,    2,    7,  385,  386,  387
  2,    2,    8,    7,  388,  389,  386
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*Nset, nset=Clamped
  379,  380,  381,  382,  383,  384, 1385, 1388, 1391, 1394, 1397
*Elset, elset=Clamped, generate
 622,  630,    2
*Nset, nset=_PickedSet8, internal, generate
    1,  1397,     1
*Elset, elset=_PickedSet8, internal, generate
   1,  630,    1
*Nset, nset=Edge_nodes
 1, 6
*Nset, nset=Double_nodes, generate
 2,  5,  1
*Nset, nset=Mid_nodes
 385, 390, 394, 398, 402
** Section: Section-1
*Shell Section, elset=_PickedSet8, material=Material-1
0.03, 5
*End Part
**
**
** ASSEMBLY
**
*Assembly, name=Assembly
**
*Instance, name=Part-1-1, part=Part-1
*End Instance
**
*Nset, nset=_PickedSet4, internal, instance=Part-1-1
   1,   2,   3,   4,   5,   6, 385, 390, 394, 398, 402
*Elset, elset=_PickedSet4, internal, instance=Part-1-1, generate
 1,  9,  2
*Elset, elset=__PickedSurf5_E2, internal, instance=Part-1-1, generate
 622,  630,    2
*Surface, type=ELEMENT, name=_PickedSurf5, internal
__PickedSurf5_E2, E2
*End Assembly
**
** MATERIALS
**
*Material, name=Material-1
*Elastic
 2.1e+11,0.
**
** BOUNDARY CONDITIONS
**
** Name: BC-1 Type: Displacement/Rotation
*Boundary
_PickedSet4, 1, 1
_PickedSet4, 2, 2
_PickedSet4, 3, 3
_PickedSet4, 4, 4
_PickedSet4, 5, 5
_PickedSet4, 6, 6
** ----------------------------------------------------------------
**
** STEP: Step-1
**
*Step, name=Step-1, nlgeom=YES, inc=10000
*Static
0.01, 1., 1e-05, 0.01
**
** LOADS
**
** Name: Load-1   Type: Shell edge load
*Dsload
_PickedSurf5, EDTRA, 100.
**
** OUTPUT REQUESTS
**
*Restart, write, frequency=0
*Print, solve=NO
**
** FIELD OUTPUT: F-Output-1
**
*Output, field, variable=PRESELECT
**
** HISTORY OUTPUT: H-Output-1
**
*Output, history, variable=PRESELECT
*End Step
