*Heading
** Job name: cant_ring_06 Model name: Ring_plate
** Generated by: Abaqus/CAE 6.12-1
*Preprint, echo=NO, model=NO, history=NO, contact=NO
**
** PARTS
**
*Part, name=Part-1
*Node
      1,   9.99998474,           0., -0.0174532831
      2,    9.4285574,           0., -0.0164559539
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*Element, type=STRI65
   1,    1,    2,   10,  681,  682,  683
   2,   10,    9,    1,  684,  685,  683
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*Nset, nset=Fixed_edge
  673,  674,  675,  676,  677,  678,  679,  680, 2516, 2520, 2523, 2526, 2529, 2532, 2535
*Elset, elset=Fixed_edge, generate
 1164,  1176,     2
*Nset, nset=moving_edge
   1,   2,   3,   4,   5,   6,   7,   8, 681, 686, 690, 694, 698, 702, 706
*Elset, elset=moving_edge, generate
  1,  13,   2
*Nset, nset=_PickedSet8, internal, generate
    1,  2535,     1
*Elset, elset=_PickedSet8, internal, generate
    1,  1176,     1
*Nset, nset=end_nodes
 1, 8
** Section: Section-1
*Shell Section, elset=_PickedSet8, material=Material-1
0.03, 5
*End Part
**
**
** ASSEMBLY
**
*Assembly, name=Assembly
**
*Instance, name=Part-1-1, part=Part-1
*End Instance
**
*Nset, nset=_PickedSet4, internal, instance=Part-1-1
   1,   2,   3,   4,   5,   6,   7,   8, 681, 686, 690, 694, 698, 702, 706
*Elset, elset=_PickedSet4, internal, instance=Part-1-1, generate
  1,  13,   2
*End Assembly
**
** MATERIALS
**
*Material, name=Material-1
*Elastic
 2.1e+11,0.
**
** BOUNDARY CONDITIONS
**
** Name: BC-1 Type: Displacement/Rotation
*Boundary
_PickedSet4, 1, 1
_PickedSet4, 2, 2
_PickedSet4, 3, 3
_PickedSet4, 4, 4
_PickedSet4, 5, 5
_PickedSet4, 6, 6
