*Heading
** Job name: circ_plate_04 Model name: Circular plate
** Generated by: Abaqus/CAE 6.12-1
*Preprint, echo=NO, model=NO, history=NO, contact=NO
**
** PARTS
**
*Part, name=Part-1
*Node
      1,          -5.,           0.,           0.
      2,           0.,           0.,           0.
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*Element, type=STRI65
  1,   15,   16,  151,  682,  683,  684
  2,  151,  141,   15,  685,  686,  684
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*Nset, nset=_PickedSet12, internal, generate
    1,  2641,     1
*Elset, elset=_PickedSet12, internal, generate
    1,  1280,     1
*Nset, nset=edge_nodes
    1,    3,    4,    5,    6,    7
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** Section: Section-1
*Shell Section, elset=_PickedSet12, material=Material-1
0.01, 5
*End Part
**
**
** ASSEMBLY
**
*Assembly, name=Assembly
**
*Instance, name=Part-1-1, part=Part-1
*End Instance
**
*Elset, elset=__PickedSurf4_SNEG, internal, instance=Part-1-1, generate
    1,  1280,     1
*Surface, type=ELEMENT, name=_PickedSurf4, internal
__PickedSurf4_SNEG, SNEG
*End Assembly
**
** MATERIALS
**
*Material, name=Material-1
*Elastic
10920.,0.
**
** BOUNDARY CONDITIONS
**
** Name: BC-1 Type: Displacement/Rotation
*Boundary
Part-1-1.edge_nodes, 1, 1
Part-1-1.edge_nodes, 2, 2
Part-1-1.edge_nodes, 3, 3
Part-1-1.edge_nodes, 4, 4
Part-1-1.edge_nodes, 5, 5
Part-1-1.edge_nodes, 6, 6
** ----------------------------------------------------------------
**
** STEP: Step-1
**
*Step, name=Step-1
*Static
1., 1., 1e-05, 1.
**
** LOADS
**
** Name: Load-1   Type: Pressure
*Dsload
_PickedSurf4, P, 1.
**
** OUTPUT REQUESTS
**
*Restart, write, frequency=0
*Print, solve=NO
**
** FIELD OUTPUT: F-Output-1
**
*Output, field, variable=PRESELECT
**
** HISTORY OUTPUT: H-Output-1
**
*Output, history, variable=PRESELECT
*End Step
