*Heading
** Job name: half_cyl_100 Model name: Pinched cylinder
** Generated by: Abaqus/CAE 6.12-1
*Preprint, echo=NO, model=NO, history=NO, contact=NO
**
** PARTS
**
*Part, name=Part-1
*Node
      1,           0.,   101.599998,           0.
      2,           0.,   101.599998,   304.799988
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*Element, type=STRI65
  1,    1,    7,   94, 1024, 1025, 1026
  2,    7,  154,   94, 1027, 1028, 1025
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*Nset, nset=Clamped
    1,    4,    5,   80,   81,   82
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*Elset, elset=Clamped
    1,   61,  121,  181,  241,  301
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*Nset, nset=Edges
    3,    4,    5,    6,   51,   52
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*Elset, elset=Edges
  902,  904,  906,  908,  910,  912
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*Nset, nset=P
 2,
*End Part
**
**
** ASSEMBLY
**
*Assembly, name=Assembly
**
*Instance, name=Part-1-1, part=Part-1
*End Instance
**
*End Assembly
**
** MATERIALS
**
*Material, name=Material-1
*Elastic
30000.,0.
** ----------------------------------------------------------------
**
** STEP: Step-1
**
*Step, name=Step-1
*Static
1., 1., 1e-05, 1.
**
** OUTPUT REQUESTS
**
*Restart, write, frequency=0
*Print, solve=NO
**
** FIELD OUTPUT: F-Output-1
**
*Output, field, variable=PRESELECT
**
** HISTORY OUTPUT: H-Output-1
**
*Output, history, variable=PRESELECT
*End Step
