*Heading
** Job name: pinch_hemi_01 Model name: Hemisphere
** Generated by: Abaqus/CAE 6.12-1
*Preprint, echo=NO, model=NO, history=NO, contact=NO
**
** PARTS
**
*Part, name=Part-1
*Node
      1,           0.,   0.95105654, -0.309017003
      2,           0.,           0.,          -1.
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*Element, type=STRI65
  1,    1,    9,  177,  897,  898,  899
  2,  177,   62,    1,  900,  901,  899
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*Nset, nset=_PickedSet21, internal, generate
    1,  3456,     1
*Elset, elset=_PickedSet21, internal, generate
    1,  1664,     1
*Nset, nset=Set-1
    1,    2,    3,    4,    5,    6
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*Elset, elset=Set-1
    1,    2,    3,    5,    7,    9
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*Nset, nset=X0Y0Z-1
 2,
*Nset, nset=Z0Y0Z1
 5,
*Nset, nset=X1Y0Z0
 8,
*Nset, nset=X-1Y0Z0
 3,
** Section: Section-1
*Shell Section, elset=_PickedSet21, material=Material-1
0.004, 5
*End Part
**
**
** ASSEMBLY
**
*Assembly, name=Assembly
**
*Instance, name=Part-1-1, part=Part-1
*End Instance
**
*End Assembly
**
** MATERIALS
**
*Material, name=Material-1
*Elastic
 6e+09, 0.3
