*Heading
** Job name: pinch_hemi_12 Model name: Model-1
** Generated by: Abaqus/CAE 6.12-1
*Preprint, echo=NO, model=NO, history=NO, contact=NO
**
** PARTS
**
*Part, name=Part-1
*Node
      1,           0.,    9.5105648,  -3.09016991
      2,           0.,           0.,         -10.
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*Element, type=STRI65
  1,   1,   9, 141, 573, 574, 575
  2, 141,  50,   1, 576, 577, 575
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*Nset, nset=_PickedSet21, internal, generate
    1,  2184,     1
*Elset, elset=_PickedSet21, internal, generate
    1,  1040,     1
*Nset, nset=X0Y0Z-1
 2,
*Nset, nset=X0Y0Z1
 5,
*Nset, nset=X1Y0Z0
 8,
*Nset, nset=X-1Y0Z0
 3,
*Nset, nset=X-1Y1Z0
 4,
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** Section: Section-1
*Shell Section, elset=_PickedSet21, material=Material-1
0.004, 5
*End Part
**
**
** ASSEMBLY
**
*Assembly, name=Assembly
**
*Instance, name=Part-1-1, part=Part-1
*End Instance
**
*End Assembly
**
** MATERIALS
**
*Material, name=Material-1
*Elastic
 6e+09, 0.3
** ----------------------------------------------------------------
**
** STEP: Step-1
**
*Step, name=Step-1, inc=1000
*Static
0.1, 5., 5e-05, 0.1
**
** OUTPUT REQUESTS
**
*Restart, write, frequency=0
*Print, solve=NO
**
** FIELD OUTPUT: F-Output-1
**
*Output, field, variable=PRESELECT
**
** HISTORY OUTPUT: H-Output-1
**
*Output, history, variable=PRESELECT
*End Step
